folder simulations: version=37; creator=Apsim 7.10-r4171
  simulation myScenario_Clyde_84
    metfile met: filename=..\Iowa NE.met
    clock
      start_date = 01/01/1999  # Enter the start date of the simulation
      end_date = 31/12/2009  # Enter the end date of the simulation
    summaryfile
    area paddock
      surfaceom SurfaceOrganicMatter
        PoolName = soybean  # Organic Matter pool name
        type = soybean  # Organic Matter type
        mass = 1250  # Initial surface residue (kg/ha)
        cnr = 27  # C:N ratio of initial residue
        standing_fraction = 0.0  # Fraction of residue standing
      fertiliser
      maize
      folder Manager folder
        manager Sow on a fixed date
          # Sowing criteria
          date = myPD  # Enter sowing date (dd-mmm)
          # Sowing parameters
          crop = maize  # Enter name of crop to sow
          density = 8  # Enter sowing density (plants/m2)
          depth = 50  # Enter sowing depth (mm)
          cultivar = myHybrid  # Enter cultivar
          class = plant  # Enter crop growth class
          row_spacing = 760  # Enter row spacing (mm)
          on start_of_day:
```
        if (today = date('[date]') then
              [crop] sow plants =[density], sowing_depth = [depth], cultivar = [cultivar], row_spacing = [row_spacing], crop_class = [class]
         endif
```
        manager Tillage on fixed date
          # When should tillage be done
          tillage_date = 10-apr  # Enter tillage date (dd-mmm)
          # Tillage application details
          surfaceommodule = SurfaceOrganicMatter  # Module used to apply the tillage
          tillage_type = user_defined
          tillage_depth = 110  # User_defined depth of seedbed preparation (mm)
          tillage_f_incorp = 0.4  # User_defined fraction of surface residues to incorporate (0-1)
          on start_of_day:
```
         if (today = date('[tillage_date]') then
            if ('[tillage_type]' = 'user_defined') then
                '[surfaceommodule]' tillage type = [tillage_type], f_incorp = [tillage_f_incorp] (), tillage_depth = [tillage_depth]
            else
                '[surfaceommodule]' tillage type = [tillage_type]
            endif
            ready_to_till_pre_sow = 0
            till_day_pre_sow = 0
         endif
```
        manager Fertilise on fixed date
          # When should fertiliser be applied
          fert_date = myPD  # Enter fertiliser date (dd-mmm)
          fert_criteria = 1000  # Don't add fertiliser if N in top 2 layers exceeds (kg/ha)
          # Fertiliser application details
          fertmodule = fertiliser  # Module used to apply the fertiliser
          fert_amount = myNrate  # Amount of fertiliser to apply (kg/ha)
          fert_type = urea_N  # Fertiliser type
          on start_of_day:
```
         if (today = date('[fert_date]') then
            N_topsoil = no3(1) + nh4(1) + no3(2) + nh4(2)
            if (N_topsoil < [fert_criteria]) then
               [fertmodule] apply amount = [fert_amount] (kg/ha), depth = 50 (mm), type = [fert_type] ()
            endif
         endif
```
        manager2 Corn Nitrogen Prices (put before harvest rule)
          corn_price = 5  # Corn price ($/bu)
          n_price = 0.5  # Nitrogen price ($/lbs)
          fixed_cost = 600  # Fixed costs ($/acre)
```csharp
using System;
using ModelFramework;

public class Script 
{      
   [Link] Paddock MyPaddock; // Can be used to dynamically get access to simulation structure and variables
   [Input] DateTime Today;   // Equates to the value of the current simulation date - value comes from CLOCK
   [Input] double fertiliser;
   [Param] double corn_price;         // The value for this will come from the Properties page.
   [Param] double n_price;
   [Param] double fixed_cost;
   [Output] double N_rate_lbs_acre;
   [Output] double GrossReturns;
   [Output] double Ncost;
   [Output] double FixedCost;
   [Output] double NetReturn;// An example of how to make a variable available to other APSIM modules
   
   double maize_yield;

   [Output] double fert_applied;
   
   // The following event handler will be called once at the beginning of the simulation
   [EventHandler] public void OnInitialised()
   {
      fert_applied = 0.0;
   }
      
   // The following event handler will be called each day at the beginning of the day
   [EventHandler] public void OnPrepare()
   {
      fert_applied += fertiliser;
      MyPaddock.Get("maize.yield", out maize_yield);
      double maize_buac = maize_yield * 0.0159 / 0.85;
      
      N_rate_lbs_acre = fert_applied * 0.89;
      GrossReturns = corn_price * maize_buac;
      Ncost = N_rate_lbs_acre * n_price;
      FixedCost = fixed_cost;
      NetReturn = GrossReturns - FixedCost - Ncost;
   }
   
   [EventHandler] public void OnHarvesting()
   {
      fert_applied = 0.0;
   }
   
}
```
        manager Harvesting rule
          # Harvesting criteria
          crop = maize  # Enter name of crop to harvest when ripe
          on end_of_day:
```
           if ('[crop]' = 'cotton') then
              if ([crop].ozcot_status > 0) then
                  [crop] harvest
              endif
           elseif ([crop].StageName = 'harvest_ripe' or [crop].plant_status = 'dead') then
              [crop]  harvest
              [crop]  end_crop
           endif
```
        manager Empty manager
          on start_of_day:
```
corn_buac   = maize.yield * 0.0159/0.85  ! corn yield in bushels/acre @15% moisture  
Nupt_biomass   = biomass_n * 10 * 0.89     ! Above ground corn biomass N uptake in lbs N/acre
Nupt_grain     = grain_n * 10 * 0.89     !  corn grain N uptake in lbs N/acre
```
        tracker
      outputfile: filename=myScenario_Clyde_84.out; title=myScenario_Clyde_84
        variables My Variables
          variables: dd/mm/yyyy as Date, fert_applied, corn_buac, GrossReturns, NetReturn, Ncost, FixedCost, Nupt_biomass, biomass, plants
        events My Variables Events: event=harvesting
      Soil (Clyde_84 7% of AOI): SoilType=Clyde_84; Region=Floyd; State=Iowa; Country=USA; ApsoilNumber=1; Latitude=42.93; Longitude=-92.57; YearOfSampling=2018; DataSource=ssurgo2apsim
        Comments=This soil was created with data from SSURGO Database, downloaded in R via the FedData package and parameters set using the approach described by Archontoulis et al. (2014, Agron. J. 106(3):1025-1040). This soil type represents 7% of AOI.
        Water
          Thickness  BD    AirDry  LL15  DUL   SAT   KS
          100        1.35  0.22    0.25  0.35  0.45  58.19
          200        1.35  0.23    0.24  0.35  0.45  58.14
          150        1.38  0.22    0.22  0.33  0.44  57.74
          150        1.42  0.2     0.2   0.32  0.44  59.48
          200        1.5   0.2     0.2   0.32  0.43  64.8
          200        1.48  0.17    0.17  0.3   0.42  89.68
          200        1.45  0.11    0.11  0.21  0.39  423.27
          400        1.67  0.13    0.13  0.27  0.39  140.54
          390        1.7   0.13    0.13  0.28  0.39  60.5
          SoilCrop maize
            LL=[0.25, 0.24, 0.22, 0.2, 0.2, 0.17, 0.11, 0.13, 0.13]
            KL=[0.08, 0.078, 0.069, 0.062, 0.055, 0.048, 0.042, 0.034, 0.026]
            XF=[1, 1, 1, 1, 1, 1, 1, 0.75, 0]
          SoilCrop soybean
            LL=[0.25, 0.24, 0.22, 0.2, 0.2, 0.17, 0.11, 0.13, 0.13]
            KL=[0.08, 0.078, 0.069, 0.062, 0.055, 0.048, 0.042, 0.034, 0.026]
            XF=[1, 1, 1, 1, 1, 1, 1, 0.75, 0]
        SoilWater: SummerCona=4; SummerU=9; SummerDate=1-jun; WinterCona=4; WinterU=9; WinterDate=1-nov; DiffusConst=40; DiffusSlope=16; Salb=0.15; CN2Bare=82; CNRed=20; CNCov=0.8; Thickness=[100, 200, 150, 150, 200, 200, 200, 400, 390]
          SWCON=[0.287, 0.288, 0.303, 0.302, 0.254, 0.327, 0.54, 0.268, 0.222]
        SoilOrganicMatter: RootCN=45; RootWt=1000; SoilCN=13; EnrACoeff=7.4; EnrBCoeff=0.2; OCUnits=Total
          Thickness  OC    FBiom   FInert
          100        4.36  0.04    0.4
          200        4.22  0.0245  0.484
          150        2.86  0.014   0.624
          150        1.47  0.011   0.744
          200        0.77  0.01    0.8
          200        0.68  0.01    0.8
          200        0.44  0.01    0.8
          400        0.1   0.01    0.8696
          390        0.01  0.01    0.9773
        Analysis
          Thickness  PH    ParticleSizeSand  ParticleSizeClay  ParticleSizeSilt
          100        7.62  18                30                52
          200        7.62  18                30                52
          150        7.62  18                30                52
          150        7.62  20.6              30                49.4
          200        7.62  26.2              30                43.8
          200        7.68  26.7              27.2              46.1
          200        7.91  58.3              16.9              24.7
          400        8.16  47                19.5              33.5
          390        8.99  45                20                35
        Sample Intial conditions: NO3Units=ppm; NH4Units=ppm; SWUnits=Volumetric
          Thickness  NO3   NH4   SW
          100        4.36  2.18  0.35
          200        4.22  2.11  0.35
          150        2.86  1.43  0.33
          150        1.47  0.73  0.32
          200        0.77  0.38  0.32
          200        0.68  0.34  0.3
          200        0.44  0.22  0.21
          400        0.1   0.05  0.27
          390        0.01  0     0.28
  simulation myScenario_Floyd_198B
    metfile met: filename=..\Iowa NE.met
    clock
      start_date = 01/01/1999  # Enter the start date of the simulation
      end_date = 31/12/2009  # Enter the end date of the simulation
    summaryfile
    area paddock
      surfaceom SurfaceOrganicMatter
        PoolName = soybean  # Organic Matter pool name
        type = soybean  # Organic Matter type
        mass = 1250  # Initial surface residue (kg/ha)
        cnr = 27  # C:N ratio of initial residue
        standing_fraction = 0.0  # Fraction of residue standing
      fertiliser
      maize
      folder Manager folder: same as myScenario_Clyde_84.paddock.Manager folder
      outputfile: filename=myScenario_Floyd_198B.out; title=myScenario_Floyd_198B
        variables My Variables
          variables: dd/mm/yyyy as Date, fert_applied, corn_buac, GrossReturns, NetReturn, Ncost, FixedCost, Nupt_biomass, biomass, plants
        events My Variables Events: event=harvesting
      Soil (Floyd_198B 18% of AOI): SoilType=Floyd_198B; Region=Floyd; State=Iowa; Country=USA; ApsoilNumber=1; Latitude=42.93; Longitude=-92.57; YearOfSampling=2018; DataSource=ssurgo2apsim
        Comments=This soil was created with data from SSURGO Database, downloaded in R via the FedData package and parameters set using the approach described by Archontoulis et al. (2014, Agron. J. 106(3):1025-1040). This soil type represents 18% of AOI.
        Water
          Thickness  BD    AirDry  LL15  DUL   SAT   KS
          100        1.35  0.16    0.17  0.31  0.41  115.3
          200        1.35  0.16    0.17  0.31  0.41  115.27
          150        1.38  0.17    0.17  0.3   0.41  115.08
          150        1.41  0.16    0.16  0.29  0.41  130.43
          200        1.44  0.14    0.14  0.23  0.39  246.84
          200        1.42  0.1     0.1   0.2   0.39  505.28
          200        1.61  0.12    0.12  0.24  0.39  235.95
          400        1.7   0.13    0.13  0.26  0.4   60.5
          390        1.7   0.13    0.13  0.27  0.4   60.5
          SoilCrop maize
            LL=[0.17, 0.17, 0.17, 0.16, 0.14, 0.1, 0.12, 0.13, 0.13]
            KL=[0.08, 0.078, 0.069, 0.062, 0.055, 0.048, 0.042, 0.034, 0.026]
            XF=[1, 1, 1, 1, 1, 1, 1, 0.75, 0]
          SoilCrop soybean
            LL=[0.17, 0.17, 0.17, 0.16, 0.14, 0.1, 0.12, 0.13, 0.13]
            KL=[0.08, 0.078, 0.069, 0.062, 0.055, 0.048, 0.042, 0.034, 0.026]
            XF=[1, 1, 1, 1, 1, 1, 1, 0.75, 0]
        SoilWater: SummerCona=3.83; SummerU=8.65; SummerDate=1-jun; WinterCona=3.83; WinterU=8.65; WinterDate=1-nov; DiffusConst=40; DiffusSlope=16; Salb=0.15; CN2Bare=78; CNRed=20; CNCov=0.8; Thickness=[100, 200, 150, 150, 200, 200, 200, 400, 390]
          SWCON=[0.37, 0.37, 0.366, 0.382, 0.492, 0.575, 0.382, 0.263, 0.252]
        SoilOrganicMatter: RootCN=45; RootWt=1000; SoilCN=13; EnrACoeff=7.4; EnrBCoeff=0.2; OCUnits=Total
          Thickness  OC    FBiom   FInert
          100        2.33  0.04    0.4
          200        2.29  0.0245  0.484
          150        2.02  0.014   0.624
          150        1.68  0.011   0.744
          200        1.03  0.01    0.8
          200        0.55  0.01    0.8
          200        0.34  0.01    0.8
          400        0.22  0.01    0.8696
          390        0.02  0.01    0.9773
        Analysis
          Thickness  PH    ParticleSizeSand  ParticleSizeClay  ParticleSizeSilt
          100        7.62  30                23                47
          200        7.62  30                23                47
          150        7.62  30                23                47
          150        7.62  33.4              22.7              43.9
          200        7.62  51.5              21                27.5
          200        7.62  65.5              16.7              17.8
          200        7.64  52.1              20.7              27.2
          400        8.38  44.5              22.5              33
          390        9.1   44                22                34
        Sample Intial conditions: NO3Units=ppm; NH4Units=ppm; SWUnits=Volumetric
          Thickness  NO3   NH4   SW
          100        2.33  1.16  0.31
          200        2.29  1.15  0.31
          150        2.02  1.01  0.3
          150        1.68  0.84  0.29
          200        1.03  0.52  0.23
          200        0.55  0.28  0.2
          200        0.34  0.17  0.24
          400        0.22  0.11  0.26
          390        0.02  0.01  0.27
  simulation myScenario_Kenyon_83B
    metfile met: filename=..\Iowa NE.met
    clock
      start_date = 01/01/1999  # Enter the start date of the simulation
      end_date = 31/12/2009  # Enter the end date of the simulation
    summaryfile
    area paddock
      surfaceom SurfaceOrganicMatter
        PoolName = soybean  # Organic Matter pool name
        type = soybean  # Organic Matter type
        mass = 1250  # Initial surface residue (kg/ha)
        cnr = 27  # C:N ratio of initial residue
        standing_fraction = 0.0  # Fraction of residue standing
      fertiliser
      maize
      folder Manager folder: same as myScenario_Clyde_84.paddock.Manager folder
      outputfile: filename=myScenario_Kenyon_83B.out; title=myScenario_Kenyon_83B
        variables My Variables
          variables: dd/mm/yyyy as Date, fert_applied, corn_buac, GrossReturns, NetReturn, Ncost, FixedCost, Nupt_biomass, biomass, plants
        events My Variables Events: event=harvesting
      Soil (Kenyon_83B 41% of AOI): SoilType=Kenyon_83B; Region=Floyd; State=Iowa; Country=USA; ApsoilNumber=1; Latitude=42.93; Longitude=-92.57; YearOfSampling=2018; DataSource=ssurgo2apsim
        Comments=This soil was created with data from SSURGO Database, downloaded in R via the FedData package and parameters set using the approach described by Archontoulis et al. (2014, Agron. J. 106(3):1025-1040). This soil type represents 41% of AOI.
        Water
          Thickness  BD    AirDry  LL15  DUL   SAT   KS
          100        1.28  0.13    0.14  0.29  0.4   158.3
          200        1.41  0.14    0.15  0.3   0.4   152.95
          150        1.55  0.17    0.17  0.31  0.41  120.48
          150        1.61  0.18    0.18  0.3   0.41  115.4
          200        1.71  0.18    0.18  0.29  0.4   112.24
          200        1.75  0.18    0.18  0.28  0.4   60.5
          200        1.75  0.18    0.18  0.28  0.4   60.5
          400        1.77  0.17    0.17  0.28  0.4   60.5
          390        1.8   0.17    0.17  0.27  0.4   60.5
          SoilCrop maize
            LL=[0.14, 0.15, 0.17, 0.18, 0.18, 0.18, 0.18, 0.17, 0.17]
            KL=[0.08, 0.078, 0.069, 0.062, 0.055, 0.048, 0.042, 0.034, 0.026]
            XF=[1, 1, 1, 1, 1, 1, 1, 0.75, 0]
          SoilCrop soybean
            LL=[0.14, 0.15, 0.17, 0.18, 0.18, 0.18, 0.18, 0.17, 0.17]
            KL=[0.08, 0.078, 0.069, 0.062, 0.055, 0.048, 0.042, 0.034, 0.026]
            XF=[1, 1, 1, 1, 1, 1, 1, 0.75, 0]
        SoilWater: SummerCona=3.77; SummerU=8.55; SummerDate=1-jun; WinterCona=3.77; WinterU=8.55; WinterDate=1-nov; DiffusConst=40; DiffusSlope=16; Salb=0.15; CN2Bare=84; CNRed=20; CNCov=0.8; Thickness=[100, 200, 150, 150, 200, 200, 200, 400, 390]
          SWCON=[0.439, 0.358, 0.249, 0.225, 0.183, 0.164, 0.164, 0.156, 0.146]
        SoilOrganicMatter: RootCN=45; RootWt=1000; SoilCN=13; EnrACoeff=7.4; EnrBCoeff=0.2; OCUnits=Total
          Thickness  OC    FBiom   FInert
          100        1.69  0.04    0.4
          200        1.66  0.0245  0.484
          150        1.22  0.014   0.624
          150        0.72  0.011   0.744
          200        0.42  0.01    0.8
          200        0.28  0.01    0.8
          200        0.04  0.01    0.8
          400        0.21  0.01    0.8696
          390        0.01  0.01    0.9773
        Analysis
          Thickness  PH    ParticleSizeSand  ParticleSizeClay  ParticleSizeSilt
          100        6.67  36                21                43
          200        6.52  34.6              21                44.4
          150        6.48  32.5              23.4              44.1
          150        6.62  35.8              25                39.2
          200        6.73  42.4              25                32.6
          200        6.77  45                25                30
          200        6.77  45                25                30
          400        7.07  44.5              24.5              30.9
          390        7.41  44                24                32
        Sample Intial conditions: NO3Units=ppm; NH4Units=ppm; SWUnits=Volumetric
          Thickness  NO3   NH4   SW
          100        1.69  0.84  0.29
          200        1.66  0.83  0.3
          150        1.22  0.61  0.31
          150        0.72  0.36  0.3
          200        0.42  0.21  0.29
          200        0.28  0.14  0.28
          200        0.04  0.02  0.28
          400        0.21  0.1   0.28
          390        0.01  0     0.27
  simulation myScenario_Readlyn_399
    metfile met: filename=..\Iowa NE.met
    clock
      start_date = 01/01/1999  # Enter the start date of the simulation
      end_date = 31/12/2009  # Enter the end date of the simulation
    summaryfile
    area paddock
      surfaceom SurfaceOrganicMatter
        PoolName = soybean  # Organic Matter pool name
        type = soybean  # Organic Matter type
        mass = 1250  # Initial surface residue (kg/ha)
        cnr = 27  # C:N ratio of initial residue
        standing_fraction = 0.0  # Fraction of residue standing
      fertiliser
      maize
      folder Manager folder: same as myScenario_Clyde_84.paddock.Manager folder
      outputfile: filename=myScenario_Readlyn_399.out; title=myScenario_Readlyn_399
        variables My Variables
          variables: dd/mm/yyyy as Date, fert_applied, corn_buac, GrossReturns, NetReturn, Ncost, FixedCost, Nupt_biomass, biomass, plants
        events My Variables Events: event=harvesting
      Soil (Readlyn_399 33% of AOI): SoilType=Readlyn_399; Region=Floyd; State=Iowa; Country=USA; ApsoilNumber=1; Latitude=42.93; Longitude=-92.57; YearOfSampling=2018; DataSource=ssurgo2apsim
        Comments=This soil was created with data from SSURGO Database, downloaded in R via the FedData package and parameters set using the approach described by Archontoulis et al. (2014, Agron. J. 106(3):1025-1040). This soil type represents 33% of AOI.
        Water
          Thickness  BD    AirDry  LL15  DUL   SAT   KS
          100        1.35  0.17    0.18  0.32  0.41  133.26
          200        1.35  0.16    0.18  0.31  0.41  133.02
          150        1.38  0.16    0.16  0.3   0.41  132.35
          150        1.54  0.17    0.17  0.3   0.41  112.87
          200        1.75  0.16    0.16  0.27  0.41  96.65
          200        1.8   0.16    0.16  0.26  0.41  60.5
          200        1.8   0.16    0.16  0.26  0.4   60.5
          400        1.8   0.16    0.16  0.26  0.4   60.5
          390        1.8   0.16    0.16  0.26  0.4   60.5
          SoilCrop maize
            LL=[0.18, 0.18, 0.16, 0.17, 0.16, 0.16, 0.16, 0.16, 0.16]
            KL=[0.08, 0.078, 0.069, 0.062, 0.055, 0.048, 0.042, 0.034, 0.026]
            XF=[1, 1, 1, 1, 1, 1, 1, 0.75, 0]
          SoilCrop soybean
            LL=[0.18, 0.18, 0.16, 0.17, 0.16, 0.16, 0.16, 0.16, 0.16]
            KL=[0.08, 0.078, 0.069, 0.062, 0.055, 0.048, 0.042, 0.034, 0.026]
            XF=[1, 1, 1, 1, 1, 1, 1, 0.75, 0]
        SoilWater: SummerCona=3.83; SummerU=8.65; SummerDate=1-jun; WinterCona=3.83; WinterU=8.65; WinterDate=1-nov; DiffusConst=40; DiffusSlope=16; Salb=0.15; CN2Bare=82; CNRed=20; CNCov=0.8; Thickness=[100, 200, 150, 150, 200, 200, 200, 400, 390]
          SWCON=[0.354, 0.364, 0.365, 0.274, 0.202, 0.184, 0.179, 0.202, 0.205]
        SoilOrganicMatter: RootCN=45; RootWt=1000; SoilCN=13; EnrACoeff=7.4; EnrBCoeff=0.2; OCUnits=Total
          Thickness  OC    FBiom   FInert
          100        2.91  0.04    0.4
          200        2.56  0.0245  0.484
          150        1.83  0.014   0.624
          150        1.29  0.011   0.744
          200        0.77  0.01    0.8
          200        0.44  0.01    0.8
          200        0.27  0.01    0.8
          400        0.08  0.01    0.8696
          390        0.01  0.01    0.9773
        Analysis
          Thickness  PH    ParticleSizeSand  ParticleSizeClay  ParticleSizeSilt
          100        7.09  35                23                42
          200        7.09  35                23                42
          150        7.09  35                23                42
          150        6.85  33.3              24.5              42.2
          200        7.73  39.1              26.4              34.4
          200        8.15  42                27                31
          200        8.22  42.4              25.9              31.7
          400        8.44  43.8              22.4              33.7
          390        8.47  44                22                34
        Sample Intial conditions: NO3Units=ppm; NH4Units=ppm; SWUnits=Volumetric
          Thickness  NO3   NH4   SW
          100        2.91  1.45  0.32
          200        2.56  1.28  0.31
          150        1.83  0.92  0.3
          150        1.29  0.64  0.3
          200        0.77  0.38  0.27
          200        0.44  0.22  0.26
          200        0.27  0.13  0.26
          400        0.08  0.04  0.26
          390        0.01  0     0.26
