folder simulations: version=37; creator=Apsim 7.10-r4171
  simulation myTemplate
    metfile met: filename=..\Iowa NE.met
    clock
      start_date = 01/01/1999  # Enter the start date of the simulation
      end_date = 31/12/2009  # Enter the end date of the simulation
    summaryfile
    area paddock
      surfaceom SurfaceOrganicMatter
        PoolName = soybean  # Organic Matter pool name
        type = soybean  # Organic Matter type
        mass = 1250  # Initial surface residue (kg/ha)
        cnr = 27  # C:N ratio of initial residue
        standing_fraction = 0.0  # Fraction of residue standing
      fertiliser
      maize
      folder Manager folder
        manager Sow on a fixed date
          # Sowing criteria
          date = myPD  # Enter sowing date (dd-mmm)
          # Sowing parameters
          crop = maize  # Enter name of crop to sow
          density = 8  # Enter sowing density (plants/m2)
          depth = 50  # Enter sowing depth (mm)
          cultivar = myHybrid  # Enter cultivar
          class = plant  # Enter crop growth class
          row_spacing = 760  # Enter row spacing (mm)
          on start_of_day:
```
        if (today = date('[date]') then
              [crop] sow plants =[density], sowing_depth = [depth], cultivar = [cultivar], row_spacing = [row_spacing], crop_class = [class]
         endif
```
        manager Tillage on fixed date
          # When should tillage be done
          tillage_date = 10-apr  # Enter tillage date (dd-mmm)
          # Tillage application details
          surfaceommodule = SurfaceOrganicMatter  # Module used to apply the tillage
          tillage_type = user_defined
          tillage_depth = 110  # User_defined depth of seedbed preparation (mm)
          tillage_f_incorp = 0.4  # User_defined fraction of surface residues to incorporate (0-1)
          on start_of_day:
```
         if (today = date('[tillage_date]') then
            if ('[tillage_type]' = 'user_defined') then
                '[surfaceommodule]' tillage type = [tillage_type], f_incorp = [tillage_f_incorp] (), tillage_depth = [tillage_depth]
            else
                '[surfaceommodule]' tillage type = [tillage_type]
            endif
            ready_to_till_pre_sow = 0
            till_day_pre_sow = 0
         endif
```
        manager Fertilise on fixed date
          # When should fertiliser be applied
          fert_date = myPD  # Enter fertiliser date (dd-mmm)
          fert_criteria = 1000  # Don't add fertiliser if N in top 2 layers exceeds (kg/ha)
          # Fertiliser application details
          fertmodule = fertiliser  # Module used to apply the fertiliser
          fert_amount = myNrate  # Amount of fertiliser to apply (kg/ha)
          fert_type = urea_N  # Fertiliser type
          on start_of_day:
```
         if (today = date('[fert_date]') then
            N_topsoil = no3(1) + nh4(1) + no3(2) + nh4(2)
            if (N_topsoil < [fert_criteria]) then
               [fertmodule] apply amount = [fert_amount] (kg/ha), depth = 50 (mm), type = [fert_type] ()
            endif
         endif
```
        manager2 Corn Nitrogen Prices (put before harvest rule)
          corn_price = 5  # Corn price ($/bu)
          n_price = 0.5  # Nitrogen price ($/lbs)
          fixed_cost = 600  # Fixed costs ($/acre)
```csharp
using System;
using ModelFramework;

public class Script 
{      
   [Link] Paddock MyPaddock; // Can be used to dynamically get access to simulation structure and variables
   [Input] DateTime Today;   // Equates to the value of the current simulation date - value comes from CLOCK
   [Input] double fertiliser;
   [Param] double corn_price;         // The value for this will come from the Properties page.
   [Param] double n_price;
   [Param] double fixed_cost;
   [Output] double N_rate_lbs_acre;
   [Output] double GrossReturns;
   [Output] double Ncost;
   [Output] double FixedCost;
   [Output] double NetReturn;// An example of how to make a variable available to other APSIM modules
   
   double maize_yield;

   [Output] double fert_applied;
   
   // The following event handler will be called once at the beginning of the simulation
   [EventHandler] public void OnInitialised()
   {
      fert_applied = 0.0;
   }
      
   // The following event handler will be called each day at the beginning of the day
   [EventHandler] public void OnPrepare()
   {
      fert_applied += fertiliser;
      MyPaddock.Get("maize.yield", out maize_yield);
      double maize_buac = maize_yield * 0.0159 / 0.85;
      
      N_rate_lbs_acre = fert_applied * 0.89;
      GrossReturns = corn_price * maize_buac;
      Ncost = N_rate_lbs_acre * n_price;
      FixedCost = fixed_cost;
      NetReturn = GrossReturns - FixedCost - Ncost;
   }
   
   [EventHandler] public void OnHarvesting()
   {
      fert_applied = 0.0;
   }
   
}
```
        manager Harvesting rule
          # Harvesting criteria
          crop = maize  # Enter name of crop to harvest when ripe
          on end_of_day:
```
           if ('[crop]' = 'cotton') then
              if ([crop].ozcot_status > 0) then
                  [crop] harvest
              endif
           elseif ([crop].StageName = 'harvest_ripe' or [crop].plant_status = 'dead') then
              [crop]  harvest
              [crop]  end_crop
           endif
```
        manager Empty manager
          on start_of_day:
```
corn_buac   = maize.yield * 0.0159/0.85  ! corn yield in bushels/acre @15% moisture  
Nupt_biomass   = biomass_n * 10 * 0.89     ! Above ground corn biomass N uptake in lbs N/acre
Nupt_grain     = grain_n * 10 * 0.89     !  corn grain N uptake in lbs N/acre
```
        tracker
      outputfile: filename=myTemplate.out; title=myTemplate
        variables My Variables
          variables: dd/mm/yyyy as Date, fert_applied, corn_buac, GrossReturns, NetReturn, Ncost, FixedCost, Nupt_biomass, biomass, plants
        events My Variables Events: event=harvesting
